*DO	*DO, Par, IVAL, FVAL, INC	Defines the beginning of a do-loop.	https://www.sharcnet.ca/Software/Ansys/16.2.3/en-us/help/ans_cmd/Hlp_C_DO.html
*ENDDO	*ENDDO	Ends a do-loop and starts the looping action.	https://www.sharcnet.ca/Software/Ansys/16.2.3/en-us/help/ans_cmd/Hlp_C_ENDDO.html
/ANG	/ANGLE, WN, THETA, Axis, KINCR	Rotates the display about an axis.	https://www.sharcnet.ca/Software/Ansys/16.2.3/en-us/help/ans_cmd/Hlp_C_ANGLE.html
/ANGLE	/ANGLE, WN, THETA, Axis, KINCR	Rotates the display about an axis.	https://www.sharcnet.ca/Software/Ansys/16.2.3/en-us/help/ans_cmd/Hlp_C_ANGLE.html
/ESHAPE	/ESHAPE, SCALE, KEY	Displays elements with shapes determined from the real constants or section definition.	https://www.sharcnet.ca/Software/Ansys/16.2.3/en-us/help/ans_cmd/Hlp_C_ESHAPE.html
/IMAGE	/IMAGE, Label, Fname, Ext, --	Allows graphics data to be captured and saved.	https://www.sharcnet.ca/Software/Ansys/16.2.3/en-us/help/ans_cmd/Hlp_C_IMAGE.html
/PNUM	/PNUM, Label, KEY	Controls entity numbering/coloring on plots.	https://www.sharcnet.ca/Software/Ansys/16.2.3/en-us/help/ans_cmd/Hlp_C_PNUM.html
/POST1	/POST1	Enters the database results postprocessor.	https://www.sharcnet.ca/Software/Ansys/16.2.3/en-us/help/ans_cmd/Hlp_C_POST1.html
/PREP7	/PREP7	Enters the model creation preprocessor.	https://www.sharcnet.ca/Software/Ansys/16.2.3/en-us/help/ans_cmd/Hlp_C_PREP7.html
/REP	/REPLOT, Label	Automatically reissues the last display command for convenience.	https://www.sharcnet.ca/Software/Ansys/16.2.3/en-us/help/ans_cmd/Hlp_C_REPLOT.html
/REPLOT	/REPLOT, Label	Automatically reissues the last display command for convenience.	https://www.sharcnet.ca/Software/Ansys/16.2.3/en-us/help/ans_cmd/Hlp_C_REPLOT.html
/RGB	/RGB, Kywrd, PRED, PGRN, PBLU, N1, N2, NINC, NCNTR	Specifies the RGB color values for indices and contours.	https://www.sharcnet.ca/Software/Ansys/16.2.3/en-us/help/ans_cmd/Hlp_C_RGB.html
/SOL	/SOLU	Enters the solution processor.	https://www.sharcnet.ca/Software/Ansys/16.2.3/en-us/help/ans_cmd/Hlp_C_SOLU_sl.html
/SOLU	/SOLU	Enters the solution processor.	https://www.sharcnet.ca/Software/Ansys/16.2.3/en-us/help/ans_cmd/Hlp_C_SOLU_sl.html
/VIEW	/VIEW, WN, XV, YV, ZV	Defines the viewing direction for the display.	https://www.sharcnet.ca/Software/Ansys/16.2.3/en-us/help/ans_cmd/Hlp_C_VIEW.html
ACEL	ACEL, ACEL_X, ACEL_Y, ACEL_Z	Specifies the linear acceleration of the global Cartesian reference frame for the analysis.	https://www.sharcnet.ca/Software/Ansys/16.2.3/en-us/help/ans_cmd/Hlp_C_ACEL.html
AGEN	AGEN, ITIME, NA1, NA2, NINC, DX, DY, DZ, KINC, NOELEM, IMOVE	Generates additional areas from a pattern of areas.	https://www.sharcnet.ca/Software/Ansys/16.2.3/en-us/help/ans_cmd/Hlp_C_AGEN.html
AL	AL, L1, L2, L3, L4, L5, L6, L7, L8, L9, L10	Generates an area bounded by previously defined lines.	https://www.sharcnet.ca/Software/Ansys/16.2.3/en-us/help/ans_cmd/Hlp_C_AL.html
ALLSEL	ALLSEL, LabT, Entity	Selects all entities with a single command.	https://www.sharcnet.ca/Software/Ansys/16.2.3/en-us/help/ans_cmd/Hlp_C_ALLSEL.html
AMESH	AMESH, NA1, NA2, NINC	Generates nodes and area elements within areas.	https://www.sharcnet.ca/Software/Ansys/16.2.3/en-us/help/ans_cmd/Hlp_C_AMESH.html
ANTYPE	ANTYPE, Antype, Status, LDSTEP, SUBSTEP, Action	Specifies the analysis type and restart status.	https://www.sharcnet.ca/Software/Ansys/16.2.3/en-us/help/ans_cmd/Hlp_C_ANTYPE.html
AREFINE	AREFINE, NA1, NA2, NINC, LEVEL, DEPTH, POST, RETAIN	Refines the mesh around specified areas.	https://www.sharcnet.ca/Software/Ansys/16.2.3/en-us/help/ans_cmd/Hlp_C_AREFINE.html
AREVERSE	AREVERSE, ANUM, NOEFLIP	Reverses the normal of an area, regardless of its connectivity or mesh status.	https://www.sharcnet.ca/Software/Ansys/16.2.3/en-us/help/ans_cmd/Hlp_C_AREVERSE.html
AROTAT	AROTAT, NL1, NL2, NL3, NL4, NL5, NL6, PAX1, PAX2, ARC, NSEG	Generates cylindrical areas by rotating a line pattern about an axis.	https://www.sharcnet.ca/Software/Ansys/16.2.3/en-us/help/ans_cmd/Hlp_C_AROTAT.html
ASBA	ASBA, NA1, NA2, SEPO, KEEP1, KEEP2	Subtracts areas from areas.	https://www.sharcnet.ca/Software/Ansys/16.2.3/en-us/help/ans_cmd/Hlp_C_ASBA.html
BLC4	BLC4, XCORNER, YCORNER, WIDTH, HEIGHT, DEPTH	Creates a rectangular area or block volume by corner points.	https://www.sharcnet.ca/Software/Ansys/16.2.3/en-us/help/ans_cmd/Hlp_C_BLC4.html
BLC5	BLC5, XCENTER, YCENTER, WIDTH, HEIGHT, DEPTH	Creates a rectangular area or block volume by center and corner points.	https://www.sharcnet.ca/Software/Ansys/16.2.3/en-us/help/ans_cmd/Hlp_C_BLC5.html
CSKP	CSKP, KCN, KCS, PORIG, PXAXS, PXYPL, PAR1, PAR2	Defines a local coordinate system by three keypoint locations.	https://www.sharcnet.ca/Software/Ansys/16.2.3/en-us/help/ans_cmd/Hlp_C_CSKP.html
D	D, Node, Lab, VALUE, VALUE2, NEND, NINC, Lab2, Lab3, Lab4, Lab5, Lab6	Defines degree-of-freedom constraints at nodes.	https://www.sharcnet.ca/Software/Ansys/16.2.3/en-us/help/ans_cmd/Hlp_C_D.html
DK	DK, KPOI, Lab, VALUE, VALUE2, KEXPND, Lab2, Lab3, Lab4, Lab5, Lab6	Defines DOF constraints at keypoints.	https://www.sharcnet.ca/Software/Ansys/16.2.3/en-us/help/ans_cmd/Hlp_C_DK.html
DL	DL, LINE, AREA, Lab, Value1, Value2	Defines DOF constraints on lines.	https://www.sharcnet.ca/Software/Ansys/16.2.3/en-us/help/ans_cmd/Hlp_C_DL.html
EPLOT	EPLOT	Produces an element display.	https://www.sharcnet.ca/Software/Ansys/16.2.3/en-us/help/ans_cmd/Hlp_C_EPLOT.html
EQSLV	EQSLV, Lab, TOLER, MULT, --, KeepFile	Specifies the type of equation solver.	https://www.sharcnet.ca/Software/Ansys/16.2.3/en-us/help/ans_cmd/Hlp_C_EQSLV.html
ESLL	ESLL, Type	Selects those elements associated with the selected lines.	https://www.sharcnet.ca/Software/Ansys/16.2.3/en-us/help/ans_cmd/Hlp_C_ESLL.html
ET	ET, ITYPE, Ename, KOP1, KOP2, KOP3, KOP4, KOP5, KOP6, INOPR	Defines a local element type from the element library.	https://www.sharcnet.ca/Software/Ansys/16.2.3/en-us/help/ans_cmd/Hlp_C_ET.html
ETABLE	ETABLE, Lab, Item, Comp, Option	Fills a table of element values for further processing.	https://www.sharcnet.ca/Software/Ansys/16.2.3/en-us/help/ans_cmd/Hlp_C_ETABLE.html
F	F, NODE, Lab, VALUE, VALUE2, NEND, NINC	Specifies force loads at nodes.	https://www.sharcnet.ca/Software/Ansys/16.2.3/en-us/help/ans_cmd/Hlp_C_F.html
FDELE	FDELE, NODE, Lab, NEND, NINC, Lkey	Deletes force loads on nodes.	https://www.sharcnet.ca/Software/Ansys/16.2.3/en-us/help/ans_cmd/Hlp_C_FDELE.html
FINISH	FINISH	Exits normally from a processor.	https://www.sharcnet.ca/Software/Ansys/16.2.3/en-us/help/ans_cmd/Hlp_C_FINISH.html
FK	FK, KPOI, Lab, VALUE, VALUE2	Defines force loads at keypoints.	https://www.sharcnet.ca/Software/Ansys/16.2.3/en-us/help/ans_cmd/Hlp_C_FK.html
K	K, NPT, X, Y, Z	Defines a keypoint.	https://www.sharcnet.ca/Software/Ansys/16.2.3/en-us/help/ans_cmd/Hlp_C_K.html
KEYOPT	KEYOPT, ITYPE, KNUM, VALUE	Sets element key options.	https://www.sharcnet.ca/Software/Ansys/16.2.3/en-us/help/ans_cmd/Hlp_C_KEYOPT.html
KEYW	KEYW, Keyword, KEY	Sets a keyword used by the GUI for context filtering (GUI).	https://www.sharcnet.ca/Software/Ansys/16.2.3/en-us/help/ans_cmd/Hlp_C_KEYW.html
KGEN	KGEN, ITIME, NP1, NP2, NINC, DX, DY, DZ, KINC, NOELEM, IMOVE	Generates additional keypoints from a pattern of keypoints.	https://www.sharcnet.ca/Software/Ansys/16.2.3/en-us/help/ans_cmd/Hlp_C_KGEN.html
KSEL	KSEL, Type, Item, Comp, VMIN, VMAX, VINC, KABS	Selects a subset of keypoints or hard points.	https://www.sharcnet.ca/Software/Ansys/16.2.3/en-us/help/ans_cmd/Hlp_C_KSEL.html
L	L, P1, P2, NDIV, SPACE, XV1, YV1, ZV1, XV2, YV2, ZV2	Defines a line between two keypoints.	https://www.sharcnet.ca/Software/Ansys/16.2.3/en-us/help/ans_cmd/Hlp_C_L.html
LARC	LARC, P1, P2, PC, RAD	Defines a circular arc.	https://www.sharcnet.ca/Software/Ansys/16.2.3/en-us/help/ans_cmd/Hlp_C_LARC.html
LATT	LATT, MAT, REAL, TYPE, --, KB, KE, SECNUM	Associates element attributes with the selected, unmeshed lines.	https://www.sharcnet.ca/Software/Ansys/16.2.3/en-us/help/ans_cmd/Hlp_C_LATT.html
LCASE	LCASE, LCNO	Reads a load case into the database.	https://www.sharcnet.ca/Software/Ansys/16.2.3/en-us/help/ans_cmd/Hlp_C_LCASE.html
LCDEF	LCDEF, LCNO, LSTEP, SBSTEP, KIMG	Creates a load case from a set of results on a results file.	https://www.sharcnet.ca/Software/Ansys/16.2.3/en-us/help/ans_cmd/Hlp_C_LCDEF.html
LCOPER	LCOPER, Oper, LCASE1, Oper2, LCASE2	Performs load case operations.	https://www.sharcnet.ca/Software/Ansys/16.2.3/en-us/help/ans_cmd/Hlp_C_LCOPER.html
LESIZE	LESIZE, NL1, SIZE, ANGSIZ, NDIV, SPACE, KFORC, LAYER1, LAYER2, KYNDIV	Specifies the divisions and spacing ratio on unmeshed lines.	https://www.sharcnet.ca/Software/Ansys/16.2.3/en-us/help/ans_cmd/Hlp_C_LESIZE.html
LFILLT	LFILLT, NL1, NL2, RAD, PCENT	Generates a fillet line between two intersecting lines.	https://www.sharcnet.ca/Software/Ansys/16.2.3/en-us/help/ans_cmd/Hlp_C_LFILLT.html
LGEN	LGEN, ITIME, NL1, NL2, NINC, DX, DY, DZ, KINC, NOELEM, IMOVE	Generates additional lines from a pattern of lines.	https://www.sharcnet.ca/Software/Ansys/16.2.3/en-us/help/ans_cmd/Hlp_C_LGEN.html
LINL	LINL, NL1, NL2, NL3, NL4, NL5, NL6, NL7, NL8, NL9	Finds the common intersection of lines.	https://www.sharcnet.ca/Software/Ansys/16.2.3/en-us/help/ans_cmd/Hlp_C_LINL.html
LMESH	LMESH, NL1, NL2, NINC	Generates nodes and line elements along lines.	https://www.sharcnet.ca/Software/Ansys/16.2.3/en-us/help/ans_cmd/Hlp_C_LMESH.html
LSEL	LSEL, Type, Item, Comp, VMIN, VMAX, VINC, KSWP	Selects a subset of lines.	https://www.sharcnet.ca/Software/Ansys/16.2.3/en-us/help/ans_cmd/Hlp_C_LSEL.html
LSSOLVE	LSSOLVE, LSMIN, LSMAX, LSINC	Reads and solves multiple load steps.	https://www.sharcnet.ca/Software/Ansys/16.2.3/en-us/help/ans_cmd/Hlp_C_LSSOLVE.html
LSWRITE	LSWRITE, LSNUM	Writes load and load step option data to a file.	https://www.sharcnet.ca/Software/Ansys/16.2.3/en-us/help/ans_cmd/Hlp_C_LSWRITE.html
LSYMM	LSYMM, Ncomp, NL1, NL2, NINC, KINC, NOELEM, IMOVE	Generates lines from a line pattern by symmetry reflection.	https://www.sharcnet.ca/Software/Ansys/16.2.3/en-us/help/ans_cmd/Hlp_C_LSYMM.html
LUMPM	LUMPM, Key	Specifies a lumped mass matrix formulation.	https://www.sharcnet.ca/Software/Ansys/16.2.3/en-us/help/ans_cmd/Hlp_C_LUMPM.html
MODOPT	MODOPT, Method, NMODE, FREQB, FREQE, Cpxmod, Nrmkey, ModType, BlockSize, --, --, Scalekey	Specifies modal analysis options.	https://www.sharcnet.ca/Software/Ansys/16.2.3/en-us/help/ans_cmd/Hlp_C_MODOPT.html
MPDATA	MPDATA, Lab, MAT, SLOC, C1, C2, C3, C4, C5, C6	Defines property data to be associated with the temperature table.	https://www.sharcnet.ca/Software/Ansys/16.2.3/en-us/help/ans_cmd/Hlp_C_MPDATA.html
MPTEMP	MPTEMP, SLOC, T1, T2, T3, T4, T5, T6	Defines a temperature table for material properties.	https://www.sharcnet.ca/Software/Ansys/16.2.3/en-us/help/ans_cmd/Hlp_C_MPTEMP.html
MSHAPE	MSHAPE, KEY, Dimension	For elements that support multiple shapes, specifies the element shape to be used for meshing.	https://www.sharcnet.ca/Software/Ansys/16.2.3/en-us/help/ans_cmd/Hlp_C_MSHAPE.html
MSHKEY	MSHKEY, KEY	Specifies whether free meshing or mapped meshing should be used to mesh a model.	https://www.sharcnet.ca/Software/Ansys/16.2.3/en-us/help/ans_cmd/Hlp_C_MSHKEY.html
MSHKEY	MSHKEY, KEY	Specifies whether free meshing or mapped meshing should be used to mesh a model.	https://www.sharcnet.ca/Software/Ansys/16.2.3/en-us/help/ans_cmd/Hlp_C_MSHKEY.html
MXPAND	MXPAND, NMODE, FREQB, FREQE, Elcalc, SIGNIF, MSUPkey, ModeSelMethod	Specifies the number of modes to expand and write for a modal or buckling analysis.	https://www.sharcnet.ca/Software/Ansys/16.2.3/en-us/help/ans_cmd/Hlp_C_MXPAND.html
NSEL	NSEL, Type, Item, Comp, VMIN, VMAX, VINC, KABS	Selects a subset of nodes.	https://www.sharcnet.ca/Software/Ansys/16.2.3/en-us/help/ans_cmd/Hlp_C_NSEL.html
NSLK	NSLK, Type	Selects those nodes associated with the selected keypoints.	https://www.sharcnet.ca/Software/Ansys/16.2.3/en-us/help/ans_cmd/Hlp_C_NSLK.html
NSLL	NSLL, Type, NKEY	Selects those nodes associated with the selected lines.	https://www.sharcnet.ca/Software/Ansys/16.2.3/en-us/help/ans_cmd/Hlp_C_NSLL.html
NUMMRG	NUMMRG, Label, TOLER, GTOLER, Action, Switch	Merges coincident or equivalently defined items.	https://www.sharcnet.ca/Software/Ansys/16.2.3/en-us/help/ans_cmd/Hlp_C_NUMMRG.html
PATH	PATH, NAME, nPts, nSets, nDiv	Defines a path name and establishes parameters for the path.	https://www.sharcnet.ca/Software/Ansys/16.2.3/en-us/help/ans_cmd/Hlp_C_PATH.html
PDEF	PDEF, Lab, Item, Comp, Avglab	Interpolates an item onto a path.	https://www.sharcnet.ca/Software/Ansys/16.2.3/en-us/help/ans_cmd/Hlp_C_PDEF.html
PLDISP	PLDISP, KUND	Displays the displaced structure.	https://www.sharcnet.ca/Software/Ansys/16.2.3/en-us/help/ans_cmd/Hlp_C_PLDISP.html
PLLS	PLLS, LabI, LabJ, Fact, KUND, ViewUP	Displays element table items as contoured areas along elements.	https://www.sharcnet.ca/Software/Ansys/16.2.3/en-us/help/ans_cmd/Hlp_C_PLLS.html
PLNSOL	PLNSOL, Item, Comp, KUND, Fact, FileID	Displays results as continuous contours.	https://www.sharcnet.ca/Software/Ansys/16.2.3/en-us/help/ans_cmd/Hlp_C_PLNSOL.html
PLPATH	PLPATH, Lab1, Lab2, Lab3, Lab4, Lab5, Lab6	Displays path items on a graph.	https://www.sharcnet.ca/Software/Ansys/16.2.3/en-us/help/ans_cmd/Hlp_C_PLPATH.html
PPATH	PPATH, POINT, NODE, X, Y, Z, CS	Defines a path by picking or defining nodes, or locations on the currently active working plane, or by entering specific coordinate locations.	https://www.sharcnet.ca/Software/Ansys/16.2.3/en-us/help/ans_cmd/Hlp_C_PPATH.html
PSTRES	PSTRES, Key	Specifies whether prestress effects are calculated or included.	https://www.sharcnet.ca/Software/Ansys/16.2.3/en-us/help/ans_cmd/Hlp_C_PSTRES.html
R	R, NSET, R1, R2, R3, R4, R5, R6	Defines the element real constants.	https://www.sharcnet.ca/Software/Ansys/16.2.3/en-us/help/ans_cmd/Hlp_C_R.html
SECDATA	SECDATA, VAL1, VAL2, VAL3, VAL4, VAL5, VAL6, VAL7, VAL8, VAL9, VAL10, VAL11, VAL12	Describes the geometry of a section.	https://www.sharcnet.ca/Software/Ansys/16.2.3/en-us/help/ans_cmd/Hlp_C_SECDATA.html
SECN	SECNUM, SECID	Sets the element section attribute pointer.	https://www.sharcnet.ca/Software/Ansys/16.2.3/en-us/help/ans_cmd/Hlp_C_SECNUM.html
SECNUM	SECNUM, SECID	Sets the element section attribute pointer.	https://www.sharcnet.ca/Software/Ansys/16.2.3/en-us/help/ans_cmd/Hlp_C_SECNUM.html
SECOFFSET	SECOFFSET, Location, OFFSET1, OFFSET2, CG-Y, CG-Z, SH-Y, SH-Z	Defines the section offset for cross sections.	https://www.sharcnet.ca/Software/Ansys/16.2.3/en-us/help/ans_cmd/Hlp_C_SECOFFSET.html
SECT	SECTYPE, SECID, Type, Subtype, Name, REFINEKEY	Associates section type information with a section ID number.	https://www.sharcnet.ca/Software/Ansys/16.2.3/en-us/help/ans_cmd/Hlp_C_SECTYPE.html
SECTYPE	SECTYPE, SECID, Type, Subtype, Name, REFINEKEY	Associates section type information with a section ID number.	https://www.sharcnet.ca/Software/Ansys/16.2.3/en-us/help/ans_cmd/Hlp_C_SECTYPE.html
SET	SET, Lstep, Sbstep, Fact, KIMG, TIME, ANGLE, NSET, ORDER	Defines the data set to be read from the results file.	https://www.sharcnet.ca/Software/Ansys/16.2.3/en-us/help/ans_cmd/Hlp_C_SET.html
SFA	SFA, Area, LKEY, Lab, VALUE, VALUE2	Specifies surface loads on the selected areas.	https://www.sharcnet.ca/Software/Ansys/16.2.3/en-us/help/ans_cmd/Hlp_C_SFA.html
SFBEAM	SFBEAM, Elem, LKEY, Lab, VALI, VALJ, VAL2I, VAL2J, IOFFST, JOFFST, LENRAT	Specifies surface loads on beam and pipe elements.	https://www.sharcnet.ca/Software/Ansys/16.2.3/en-us/help/ans_cmd/Hlp_C_SFBEAM.html
SFL	SFL, Line, Lab, VALI, VALJ, VAL2I, VAL2J	Specifies surface loads on lines of an area.	https://www.sharcnet.ca/Software/Ansys/16.2.3/en-us/help/ans_cmd/Hlp_C_SFL.html
SFLDELE	SFLDELE, LINE, Lab	Deletes surface loads from lines.	https://www.sharcnet.ca/Software/Ansys/16.2.3/en-us/help/ans_cmd/Hlp_C_SFLDELE.html
SMRT	SMRTSIZE, SIZLVL, FAC, EXPND, TRANS, ANGL, ANGH, GRATIO, SMHLC, SMANC, MXITR, SPRX	Specifies meshing parameters for automatic (smart) element sizing.	https://www.sharcnet.ca/Software/Ansys/16.2.3/en-us/help/ans_cmd/Hlp_C_SMRTSIZE.htmlSMRT	SMRTSIZE, SIZLVL, FAC, EXPND, TRANS, ANGL, ANGH, GRATIO, SMHLC, SMANC, MXITR, SPRX	Specifies meshing parameters for automatic (smart) element 
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SMRTSIZE	SMRTSIZE, SIZLVL, FAC, EXPND, TRANS, ANGL, ANGH, GRATIO, SMHLC, SMANC, MXITR, SPRX	Specifies meshing parameters for automatic (smart) element sizing.	https://www.sharcnet.ca/Software/Ansys/16.2.3/en-us/help/ans_cmd/Hlp_C_SMRTSIZE.html
SOLVE	SOLVE, Action	Starts a solution.	https://www.sharcnet.ca/Software/Ansys/16.2.3/en-us/help/ans_cmd/Hlp_C_SOLVE.html
TYPE	TYPE, ITYPE	Sets the element type attribute pointer.	https://www.sharcnet.ca/Software/Ansys/16.2.3/en-us/help/ans_cmd/Hlp_C_TYPE.html
V	V, P1, P2, P3, P4, P5, P6, P7, P8	Defines a volume through keypoints.	https://www.sharcnet.ca/Software/Ansys/16.2.3/en-us/help/ans_cmd/Hlp_C_V.html
VEXT	VEXT, NA1, NA2, NINC, DX, DY, DZ, RX, RY, RZ	Generates additional volumes by extruding areas.	https://www.sharcnet.ca/Software/Ansys/16.2.3/en-us/help/ans_cmd/Hlp_C_VEXT.html
VMESH	VMESH, NV1, NV2, NINC	Generates nodes and volume elements within volumes.	https://www.sharcnet.ca/Software/Ansys/16.2.3/en-us/help/ans_cmd/Hlp_C_VMESH.html
VROTAT	VROTAT, NA1, NA2, NA3, NA4, NA5, NA6, PAX1, PAX2, ARC, NSEG	Generates cylindrical volumes by rotating an area pattern about an axis.	https://www.sharcnet.ca/Software/Ansys/16.2.3/en-us/help/ans_cmd/Hlp_C_VROTAT.html
VSWEEP	VSWEEP, VNUM, SRCA, TRGA, LSMO	Fills an existing unmeshed volume with elements by sweeping the mesh from an adjacent area through the volume.	https://www.sharcnet.ca/Software/Ansys/16.2.3/en-us/help/ans_cmd/Hlp_C_VSWEEP.html
WPOFFS	WPOFFS, XOFF, YOFF, ZOFF	Offsets the working plane.	https://www.sharcnet.ca/Software/Ansys/16.2.3/en-us/help/ans_cmd/Hlp_C_WPOFFS.html
WPROTA	WPROTA, THXY, THYZ, THZX	Rotates the working plane.	https://www.sharcnet.ca/Software/Ansys/16.2.3/en-us/help/ans_cmd/Hlp_C_WPROTA.html
DA	DA, AREA, Lab, Value1, Value2	Defines degree-of-freedom constraints on areas.	https://www.sharcnet.ca/Software/Ansys/17.0/en-us/help/ans_cmd/Hlp_C_DA.html
DSYS	DSYS, KCN	Activates a display coordinate system for geometry listings and plots.	https://www.sharcnet.ca/Software/Ansys/17.0/en-us/help/ans_cmd/Hlp_C_DSYS.html
SFGRAD	SFGRAD, Lab, SLKCN, Sldir, SLZER, SLOPE	Specifies a gradient (slope) for surface loads.	https://www.sharcnet.ca/Software/Ansys/17.0/en-us/help/ans_cmd/Hlp_C_SFGRAD.html
ADRAG   ADRAG, NL1, NL2, NL3, NL4, NL5, NL6, NLP1, NLP2, NLP3, NLP4, NLP5, NLP6 Generates areas by dragging a line pattern along a path.    https://www.sharcnet.ca/Software/Ansys/16.2.3/en-us/help/ans_cmd/Hlp_C_ADRAG.html
SECCONTROL  SECCONTROL, VAL1, VAL2, VAL3, VAL4, VAL5, VAL6, VAL7, VAL8, VAL9, VAL10, VAL11, VAL12, VAL13    Supplements or overrides default section properties.    https://www.sharcnet.ca/Software/Ansys/16.2.3/en-us/help/ans_cmd/Hlp_C_SECCONTROL.html
CIRCLE  CIRCLE, PCENT, RAD, PAXIS, PZERO, ARC, NSEG Generates circular arc lines.   https://www.sharcnet.ca/Software/Ansys/16.2.3/en-us/help/ans_cmd/Hlp_C_CIRCLE.html
CSYS    CSYS, KCN   Activates a previously defined coordinate system.   https://www.sharcnet.ca/Software/Ansys/16.2.3/en-us/help/ans_cmd/Hlp_C_CSYS.html
/PSYMB  /PSYMB, Label, KEY  Shows various symbols on displays.  https://www.sharcnet.ca/Software/Ansys/16.2.3/en-us/help/ans_cmd/Hlp_C_PSYMB.html
GPLOT   GPLOT   Controls general plotting.  https://www.sharcnet.ca/Software/Ansys/16.2.3/en-us/help/ans_cmd/Hlp_C_GPLOT.html
NROTAT  NROTAT, NODE1, NODE2, NINC  Rotates nodal coordinate systems into the active system.    https://www.sharcnet.ca/Software/Ansys/16.2.3/en-us/help/ans_cmd/Hlp_C_NROTAT.html
