AFUN	*AFUN, Lab	Specifies units for angular functions in parameter expressions.	/ans_cmd/Hlp_C_AFUN.html
DO	*DO, Par, IVAL, FVAL, INC	Defines the beginning of a do-loop.	/ans_cmd/Hlp_C_DO.html
ENDDO	*ENDDO	Ends a do-loop and starts the looping action.	/ans_cmd/Hlp_C_ENDDO.html
GET	*GET, Par, Entity, ENTNUM, Item1, IT1NUM, Item2, IT2NUM	Retrieves a value and stores it as a scalar parameter or part of an array parameter.	/ans_cmd/Hlp_C_GET.html
VWRITE	*VWRITE, Par1, Par2, Par3, Par4, Par5, Par6, Par7, Par8, Par9, Par10, Par11, Par12, Par13, Par14, Par15, Par16, Par17, Par18, Par19	Writes data to a file in a formatted sequence.	/ans_cmd/Hlp_C_VWRITE.html
/ANG	/ANGLE, WN, THETA, Axis, KINCR	Rotates the display about an axis.	/ans_cmd/Hlp_C_ANGLE.html
/ANGLE	/ANGLE, WN, THETA, Axis, KINCR	Rotates the display about an axis.	/ans_cmd/Hlp_C_ANGLE.html
/AXLAB	/AXLAB, Axis, Lab	Labels the X and Y axes on graph displays.	/ans_cmd/Hlp_C_AXLAB.html
/COLOR	/COLOR, Lab, Clab, N1, N2, NINC	Specifies the color mapping for various items.	/ans_cmd/Hlp_C_COLOR.html
/DSCALE	/DSCALE, WN, DMULT	Sets the displacement multiplier for displacement displays.	/ans_cmd/Hlp_C_DSCALE_sl.html
/EFACET	/EFACET, NUM	Specifies the number of facets per element edge for PowerGraphics displays.	/ans_cmd/Hlp_C_EFACET.html
/ESHAPE	/ESHAPE, SCALE, KEY	Displays elements with shapes determined from the real constants or section definition.	/ans_cmd/Hlp_C_ESHAPE.html
/GROPT	/GROPT, Lab, KEY	Sets various line graph display options.	/ans_cmd/Hlp_C_GROPT.html
/IMAGE	/IMAGE, Label, Fname, Ext, --	Allows graphics data to be captured and saved.	/ans_cmd/Hlp_C_IMAGE.html
/IMAGE	/IMAGE, Label, Fname, Ext, --	Allows graphics data to be captured and saved.	/ans_cmd/Hlp_C_IMAGE.html
/INPUT	/INPUT, Fname, Ext, Dir, LINE, LOG	Switches the input file for the commands that follow.	/ans_cmd/Hlp_C_INPUT.html
/NERR	/NERR, NMERR, NMABT, --, IFKEY, NUM	Limits the number of warning and error messages displayed.	/ans_cmd/Hlp_C_NERR.html
/OUTPUT	/OUTPUT, Fname, Ext, --, Loc	Redirects text output to a file or to the screen.	/ans_cmd/Hlp_C_OUTPUT.html
/PNUM	/PNUM, Label, KEY	Controls entity numbering/coloring on plots.	/ans_cmd/Hlp_C_PNUM.html
/POST1	/POST1	Enters the database results postprocessor.	/ans_cmd/Hlp_C_POST1.html
/POST26	/POST26	Enters the time-history results postprocessor.	/ans_cmd/Hlp_C_POST26.html
/PREP7	/PREP7	Enters the model creation preprocessor.	/ans_cmd/Hlp_C_PREP7.html
/PSYMB	/PSYMB, Label, KEY	Shows various symbols on displays.	/ans_cmd/Hlp_C_PSYMB.html
/PSYMB  /PSYMB, Label, KEY  Shows various symbols on displays.  /ans_cmd/Hlp_C_PSYMB.html
/RATIO	/RATIO, WN, RATOX, RATOY	Distorts the object geometry.
/REP	/REPLOT, Label	Automatically reissues the last display command for convenience.	/ans_cmd/Hlp_C_REPLOT.html
/REPLOT	/REPLOT, Label	Automatically reissues the last display command for convenience.	/ans_cmd/Hlp_C_REPLOT.html
/RGB	/RGB, Kywrd, PRED, PGRN, PBLU, N1, N2, NINC, NCNTR	Specifies the RGB color values for indices and contours.	/ans_cmd/Hlp_C_RGB.html
/SOL	/SOLU	Enters the solution processor.	/ans_cmd/Hlp_C_SOLU_sl.html
/SOLU	/SOLU	Enters the solution processor.	/ans_cmd/Hlp_C_SOLU_sl.html
/STATUS	/STATUS, Lab	Lists the status of items for the run.	/ans_cmd/Hlp_C_STATUS.html
/VIEW	/VIEW, WN, XV, YV, ZV	Defines the viewing direction for the display.	/ans_cmd/Hlp_C_VIEW.html
/XRANGE	/XRANGE, XMIN, XMAX	Specifies a linear abscissa (X) scale range.	/ans_cmd/Hlp_C_XRANGE.html
/YRANGE	/YRANGE, YMIN, YMAX, NUM	Specifies a linear ordinate (Y) scale range.	/ans_cmd/Hlp_C_YRANGE.html
A	A, P1, P2, P3, P4, P5, P6, P7, P8, P9, P10, P11, P12, P13, P14, P15, P16, P17, P18	Defines an area by connecting keypoints.	/ans_cmd/Hlp_C_A.html
ACCAT	ACCAT, NA1, NA2	Concatenates multiple areas in preparation for mapped meshing.	/ans_cmd/Hlp_C_ACCAT.html
ACEL	ACEL, ACEL_X, ACEL_Y, ACEL_Z	Specifies the linear acceleration of the global Cartesian reference frame for the analysis.	/ans_cmd/Hlp_C_ACEL.html
ADELE	ADELE, NA1, NA2, NINC, KSWP	Deletes unmeshed areas.	/ans_cmd/Hlp_C_ADELE.html
ADRAG	ADRAG, NL1, NL2, NL3, NL4, NL5, NL6, NLP1, NLP2, NLP3, NLP4, NLP5, NLP6	Generates areas by dragging a line pattern along a path.	/ans_cmd/Hlp_C_ADRAG.html
AESIZE	AESIZE, ANUM, SIZE, 	Specifies the element size to be meshed onto areas.	/ans_cmd/Hlp_C_AESIZE.html
AGEN	AGEN, ITIME, NA1, NA2, NINC, DX, DY, DZ, KINC, NOELEM, IMOVE	Generates additional areas from a pattern of areas.	/ans_cmd/Hlp_C_AGEN.html
AGLUE	AGLUE, NA1, NA2, NA3, NA4, NA5, NA6, NA7, NA8, NA9	Generates new areas by "gluing" areas.	/ans_cmd/Hlp_C_AGLUE.html
AL	AL, L1, L2, L3, L4, L5, L6, L7, L8, L9, L10	Generates an area bounded by previously defined lines.	/ans_cmd/Hlp_C_AL.html
ALLSEL	ALLSEL, LabT, Entity	Selects all entities with a single command.	/ans_cmd/Hlp_C_ALLSEL.html
ALPHAD	ALPHAD, VALUE	Defines the mass matrix multiplier for damping.	/ans_cmd/Hlp_C_ALPHAD.html
AMESH	AMESH, NA1, NA2, NINC	Generates nodes and area elements within areas.	/ans_cmd/Hlp_C_AMESH.html
ANCNTR	ANCNTR, NFRAM, DELAY, NCYCL	Produces an animated sequence of a contoured deformed shape.	/ans_cmd/Hlp_C_ANCNTR.html
ANSOL	ANSOL, NVAR, NODE, Item, Comp, Name, Mat, Real, Ename	Specifies averaged nodal data to be stored from the results file in the solution coordinate system.	/ans_cmd/Hlp_C_ANSOL.html
ANTIME	ANTIME, NFRAM, DELAY, NCYCL, AUTOCNTRKY, RSLTDAT, MIN, MAX	Produces a sequential contour animation over a range of time.	/ans_cmd/Hlp_C_ANTIME.html
ANTYPE	ANTYPE, Antype, Status, LDSTEP, SUBSTEP, Action	Specifies the analysis type and restart status.	/ans_cmd/Hlp_C_ANTYPE.html
AOVLAP	AOVLAP, NA1, NA2, NA3, NA4, NA5, NA6, NA7, NA8, NA9	Overlaps areas.	/ans_cmd/Hlp_C_AOVLAP.html
AREFINE	AREFINE, NA1, NA2, NINC, LEVEL, DEPTH, POST, RETAIN	Refines the mesh around specified areas.	/ans_cmd/Hlp_C_AREFINE.html
AREVERSE	AREVERSE, ANUM, NOEFLIP	Reverses the normal of an area, regardless of its connectivity or mesh status.	/ans_cmd/Hlp_C_AREVERSE.html
AROTAT	AROTAT, NL1, NL2, NL3, NL4, NL5, NL6, PAX1, PAX2, ARC, NSEG	Generates cylindrical areas by rotating a line pattern about an axis.	/ans_cmd/Hlp_C_AROTAT.html
ARSYM	ARSYM, Ncomp, NA1, NA2, NINC, KINC, NOELEM, IMOVE	Generates areas from an area pattern by symmetry reflection.	/ans_cmd/Hlp_C_ARSYM.html
ASBA	ASBA, NA1, NA2, SEPO, KEEP1, KEEP2	Subtracts areas from areas.	/ans_cmd/Hlp_C_ASBA.html
ASBL	ASBL, NA, NL, --, KEEPA, KEEPL	Subtracts lines from areas.	/ans_cmd/Hlp_C_ASBL.html
ASEL	ASEL, Type, Item, Comp, VMIN, VMAX, VINC, KSWP	Selects a subset of areas.	/ans_cmd/Hlp_C_ASEL.html
AUTOTS	AUTOTS, Key	Specifies whether to use automatic time stepping or load stepping.	/ans_cmd/Hlp_C_AUTOTS.html
BETAD	BETAD, VALUE	Defines the stiffness matrix multiplier for damping.	/ans_cmd/Hlp_C_BETAD.html
BFL	BFL, Line, Lab, VAL1, VAL2, VAL3, VAL4	Defines a body force load on a line.	/ans_cmd/Hlp_C_BFL.html
BLC4	BLC4, XCORNER, YCORNER, WIDTH, HEIGHT, DEPTH	Creates a rectangular area or block volume by corner points.	/ans_cmd/Hlp_C_BLC4.html
BLC5	BLC5, XCENTER, YCENTER, WIDTH, HEIGHT, DEPTH	Creates a rectangular area or block volume by center and corner points.	/ans_cmd/Hlp_C_BLC5.html
BUCOPT	BUCOPT, Method, NMODE, SHIFT, LDMULTE, RangeKey	Specifies buckling analysis options.	/ans_cmd/Hlp_C_BUCOPT.html
CERIG	CERIG, MASTE, SLAVE, Ldof, Ldof2, Ldof3, Ldof4, Ldof5	Defines a rigid region.	/ans_cmd/Hlp_C_CERIG.html
CIRCLE	CIRCLE, PCENT, RAD, PAXIS, PZERO, ARC, NSEG	Generates circular arc lines.	/ans_cmd/Hlp_C_CIRCLE.html
CNVTOL	CNVTOL, Lab, VALUE, TOLER, NORM, MINREF	Sets convergence values for nonlinear analyses.	/ans_cmd/Hlp_C_CNVTOL.html
CP	CP, NSET, Lab, NODE1, NODE2, NODE3, NODE4, NODE5, NODE6, NODE7, NODE8, NODE9, NODE10, NODE11, NODE12, NODE13, NODE14, NODE15, NODE16, NODE17	Defines (or modifies) a set of coupled degrees of freedom.	/ans_cmd/Hlp_C_CP.html
CSKP	CSKP, KCN, KCS, PORIG, PXAXS, PXYPL, PAR1, PAR2	Defines a local coordinate system by three keypoint locations.	/ans_cmd/Hlp_C_CSKP.html
CSWPLA	CSWPLA, KCN, KCS, PAR1, PAR2	Defines a local coordinate system at the origin of the working plane.	/ans_cmd/Hlp_C_CSWPLA.html
CSYS	CSYS, KCN	Activates a previously defined coordinate system.	/ans_cmd/Hlp_C_CSYS.html
CYL4	CYL4, XCENTER, YCENTER, RAD1, THETA1, RAD2, THETA2, DEPTH	Creates a circular area or cylindrical volume anywhere on the working plane.	/ans_cmd/Hlp_C_CYL4.html
CYLIND	CYLIND, RAD1, RAD2, Z1, Z2, THETA1, THETA2	Creates a cylindrical volume centered about the working plane origin.	/ans_cmd/Hlp_C_CYLIND.html
D	D, Node, Lab, VALUE, VALUE2, NEND, NINC, Lab2, Lab3, Lab4, Lab5, Lab6	Defines degree-of-freedom constraints at nodes.	/ans_cmd/Hlp_C_D.html
DA	DA, AREA, Lab, Value1, Value2	Defines degree-of-freedom constraints on areas.	/ans_cmd/Hlp_C_DA.html
DDELE	DDELE, NODE, Lab, NEND, NINC, Rkey	Deletes degree-of-freedom constraints.	/ans_cmd/Hlp_C_DDELE.html
DELTIM	DELTIM, DTIME, DTMIN, DTMAX, Carry	Specifies the time step sizes to be used for the current load step.	/ans_cmd/Hlp_C_DELTIM.html
DK	DK, KPOI, Lab, VALUE, VALUE2, KEXPND, Lab2, Lab3, Lab4, Lab5, Lab6	Defines DOF constraints at keypoints.	/ans_cmd/Hlp_C_DK.html
DL	DL, LINE, AREA, Lab, Value1, Value2	Defines DOF constraints on lines.	/ans_cmd/Hlp_C_DL.html
DLDELE	DLDELE, LINE, Lab	Deletes DOF constraints on a line.	/ans_cmd/Hlp_C_DLDELE.html
DMPSTR	DMPSTR, COEFF	Sets a constant structural damping coefficient.	/ans_cmd/Hlp_C_DMPSTR.html
DSYS	DSYS, KCN	Activates a display coordinate system for geometry listings and plots.	/ans_cmd/Hlp_C_DSYS.html
E	E, I, J, K, L, M, N, O, P	Defines an element by node connectivity.	/ans_cmd/Hlp_C_E.html
EPLOT	EPLOT	Produces an element display.	/ans_cmd/Hlp_C_EPLOT.html
EQSLV	EQSLV, Lab, TOLER, MULT, --, KeepFile	Specifies the type of equation solver.	/ans_cmd/Hlp_C_EQSLV.html
ESEL	ESEL, Type, Item, Comp, VMIN, VMAX, VINC, KABS	Selects a subset of elements.	/ans_cmd/Hlp_C_ESEL.html
ESLL	ESLL, Type	Selects those elements associated with the selected lines.	/ans_cmd/Hlp_C_ESLL.html
ESURF	ESURF, XNODE, Tlab, Shape	Generates elements overlaid on the free faces of selected nodes.	/ans_cmd/Hlp_C_ESURF.html
ESYS	ESYS, KCN	Sets the element coordinate system attribute pointer.	/ans_cmd/Hlp_C_ESYS.html
ET	ET, ITYPE, Ename, KOP1, KOP2, KOP3, KOP4, KOP5, KOP6, INOPR	Defines a local element type from the element library.	/ans_cmd/Hlp_C_ET.html
ETABLE	ETABLE, Lab, Item, Comp, Option	Fills a table of element values for further processing.	/ans_cmd/Hlp_C_ETABLE.html
ETCHG	ETCHG, Cnv	Changes element types to their corresponding types.	/ans_cmd/Hlp_C_ETCHG.html
EXTOPT	EXTOPT, Lab, Val1, Val2, Val3, Val4	Controls options relating to the generation of volume elements from area elements.	/ans_cmd/Hlp_C_EXTOPT.html
F	F, NODE, Lab, VALUE, VALUE2, NEND, NINC	Specifies force loads at nodes.	/ans_cmd/Hlp_C_F.html
FDELE	FDELE, NODE, Lab, NEND, NINC, Lkey	Deletes force loads on nodes.	/ans_cmd/Hlp_C_FDELE.html
FINISH	FINISH	Exits normally from a processor.	/ans_cmd/Hlp_C_FINISH.html
FK	FK, KPOI, Lab, VALUE, VALUE2	Defines force loads at keypoints.	/ans_cmd/Hlp_C_FK.html
FKDELE	FKDELE, KPOI, Lab	Deletes force loads at a keypoint.	/ans_cmd/Hlp_C_FKDELE.html
GPLOT	GPLOT	Controls general plotting.	/ans_cmd/Hlp_C_GPLOT.html
HARFRQ	HARFRQ, FREQB, FREQE, --, LogOpt, FREQARR, Toler	Defines the frequency range in a harmonic analysis.	/ans_cmd/Hlp_C_HARFRQ.html
HROPT	HROPT, Method, MAXMODE, MINMODE, MCout, Damp	Specifies harmonic analysis options.	/ans_cmd/Hlp_C_HROPT.html
HROUT	HROUT, Reimky, Clust, Mcont	Specifies the harmonic analysis output options.	/ans_cmd/Hlp_C_HROUT.html
K	K, NPT, X, Y, Z	Defines a keypoint.	/ans_cmd/Hlp_C_K.html
KBC	KBC, KEY	Specifies ramped or stepped loading within a load step.	/ans_cmd/Hlp_C_KBC.html
KEYOPT	KEYOPT, ITYPE, KNUM, VALUE	Sets element key options.	/ans_cmd/Hlp_C_KEYOPT.html
KEYW	KEYW, Keyword, KEY	Sets a keyword used by the GUI for context filtering (GUI).	/ans_cmd/Hlp_C_KEYW.html
KGEN	KGEN, ITIME, NP1, NP2, NINC, DX, DY, DZ, KINC, NOELEM, IMOVE	Generates additional keypoints from a pattern of keypoints.	/ans_cmd/Hlp_C_KGEN.html
KSEL	KSEL, Type, Item, Comp, VMIN, VMAX, VINC, KABS	Selects a subset of keypoints or hard points.	/ans_cmd/Hlp_C_KSEL.html
L	L, P1, P2, NDIV, SPACE, XV1, YV1, ZV1, XV2, YV2, ZV2	Defines a line between two keypoints.	/ans_cmd/Hlp_C_L.html
LARC	LARC, P1, P2, PC, RAD	Defines a circular arc.	/ans_cmd/Hlp_C_LARC.html
LATT	LATT, MAT, REAL, TYPE, --, KB, KE, SECNUM	Associates element attributes with the selected, unmeshed lines.	/ans_cmd/Hlp_C_LATT.html
LCASE	LCASE, LCNO	Reads a load case into the database.	/ans_cmd/Hlp_C_LCASE.html
LCCAT	LCCAT, NL1, NL2	Concatenates multiple lines into one line for mapped meshing.	/ans_cmd/Hlp_C_LCCAT.html
LCDEF	LCDEF, LCNO, LSTEP, SBSTEP, KIMG	Creates a load case from a set of results on a results file.	/ans_cmd/Hlp_C_LCDEF.html
LCOPER	LCOPER, Oper, LCASE1, Oper2, LCASE2	Performs load case operations.	/ans_cmd/Hlp_C_LCOPER.html
LDIV	LDIV, NL1, RATIO, PDIV, NDIV, KEEP	Divides a single line into two or more lines.	/ans_cmd/Hlp_C_LDIV.html
LDREAD	LDREAD, Lab, LSTEP, SBSTEP, TIME, KIMG, Fname, Ext, --	Reads results from the results file and applies them as loads.	/ans_cmd/Hlp_C_LDREAD.html
LESIZE	LESIZE, NL1, SIZE, ANGSIZ, NDIV, SPACE, KFORC, LAYER1, LAYER2, KYNDIV	Specifies the divisions and spacing ratio on unmeshed lines.	/ans_cmd/Hlp_C_LESIZE.html
LFILLT	LFILLT, NL1, NL2, RAD, PCENT	Generates a fillet line between two intersecting lines.	/ans_cmd/Hlp_C_LFILLT.html
LGEN	LGEN, ITIME, NL1, NL2, NINC, DX, DY, DZ, KINC, NOELEM, IMOVE	Generates additional lines from a pattern of lines.	/ans_cmd/Hlp_C_LGEN.html
LINL	LINL, NL1, NL2, NL3, NL4, NL5, NL6, NL7, NL8, NL9	Finds the common intersection of lines.	/ans_cmd/Hlp_C_LINL.html
LMESH	LMESH, NL1, NL2, NINC	Generates nodes and line elements along lines.	/ans_cmd/Hlp_C_LMESH.html
LOCAL	LOCAL, KCN, KCS, XC, YC, ZC, THXY, THYZ, THZX, PAR1, PAR2	Defines a local coordinate system by a location and orientation.	/ans_cmd/Hlp_C_LOCAL.html
LSEL	LSEL, Type, Item, Comp, VMIN, VMAX, VINC, KSWP	Selects a subset of lines.	/ans_cmd/Hlp_C_LSEL.html
LSSOLVE	LSSOLVE, LSMIN, LSMAX, LSINC	Reads and solves multiple load steps.	/ans_cmd/Hlp_C_LSSOLVE.html
LSWRITE	LSWRITE, LSNUM	Writes load and load step option data to a file.	/ans_cmd/Hlp_C_LSWRITE.html
LSYMM	LSYMM, Ncomp, NL1, NL2, NINC, KINC, NOELEM, IMOVE	Generates lines from a line pattern by symmetry reflection.	/ans_cmd/Hlp_C_LSYMM.html
LUMPM	LUMPM, Key	Specifies a lumped mass matrix formulation.	/ans_cmd/Hlp_C_LUMPM.html
MAT	MAT, MAT	Sets the element material attribute pointer.	/ans_cmd/Hlp_C_MAT.html
MODMSH	MODMSH, Lab	Controls the relationship of the solid model and the FE model.	/ans_cmd/Hlp_C_MODMSH.html
MODOPT	MODOPT, Method, NMODE, FREQB, FREQE, Cpxmod, Nrmkey, ModType, BlockSize, --, --, Scalekey	Specifies modal analysis options.	/ans_cmd/Hlp_C_MODOPT.html
MPDATA	MPDATA, Lab, MAT, SLOC, C1, C2, C3, C4, C5, C6	Defines property data to be associated with the temperature table.	/ans_cmd/Hlp_C_MPDATA.html
MPTEMP	MPTEMP, SLOC, T1, T2, T3, T4, T5, T6	Defines a temperature table for material properties.	/ans_cmd/Hlp_C_MPTEMP.html
MSHAPE	MSHAPE, KEY, Dimension	For elements that support multiple shapes, specifies the element shape to be used for meshing.	/ans_cmd/Hlp_C_MSHAPE.html
MSHKEY	MSHKEY, KEY	Specifies whether free meshing or mapped meshing should be used to mesh a model.	/ans_cmd/Hlp_C_MSHKEY.html
MXPAND	MXPAND, NMODE, FREQB, FREQE, Elcalc, SIGNIF, MSUPkey, ModeSelMethod	Specifies the number of modes to expand and write for a modal or buckling analysis.	/ans_cmd/Hlp_C_MXPAND.html
N	N, NODE, X, Y, Z, THXY, THYZ, THZX	Defines a node.	/ans_cmd/Hlp_C_N.html
NEQIT	NEQIT, NEQIT, FORCEkey	Specifies the maximum number of equilibrium iterations for nonlinear analyses.	/ans_cmd/Hlp_C_NEQIT.html
NKPT	NKPT, NODE, NPT	Defines a node at an existing keypoint location.	/ans_cmd/Hlp_C_NKPT.html
NLGEOM	NLGEOM, Key	Includes large-deflection effects in a static or full transient analysis.	/ans_cmd/Hlp_C_NLGEOM.html
NODE	NODE(x,y,z)	returns the number of the selected node nearest the x,y,z location (in the active coordinate system, lowest number for coincident nodes).	/ans_cmd/Hlp_C_GET.html#get.prep.node
NROTAT	NROTAT, NODE1, NODE2, NINC	Rotates nodal coordinate systems into the active system.	/ans_cmd/Hlp_C_NROTAT.html
NSEL	NSEL, Type, Item, Comp, VMIN, VMAX, VINC, KABS	Selects a subset of nodes.	/ans_cmd/Hlp_C_NSEL.html
NSLK	NSLK, Type	Selects those nodes associated with the selected keypoints.	/ans_cmd/Hlp_C_NSLK.html
NSLL	NSLL, Type, NKEY	Selects those nodes associated with the selected lines.	/ans_cmd/Hlp_C_NSLL.html
NSOL	NSOL, NVAR, NODE, Item, Comp, Name, SECTOR	Specifies nodal data to be stored from the results file.	/ans_cmd/Hlp_C_NSOL.html
NSUBST	NSUBST, NSBSTP, NSBMX, NSBMN, Carry	Specifies the number of substeps to be taken this load step.	/ans_cmd/Hlp_C_NSUBST.html
NUMCMP	NUMCMP, Label	Compresses the numbering of defined items.	/ans_cmd/Hlp_C_NUMCMP.html
NUMMRG	NUMMRG, Label, TOLER, GTOLER, Action, Switch	Merges coincident or equivalently defined items.	/ans_cmd/Hlp_C_NUMMRG.html
OMEGA	OMEGA, OMEGX, OMEGY, OMEGZ	Specifies the rotational velocity of the structure.	/ans_cmd/Hlp_C_OMEGA.html
OUTRES	OUTRES, Item, Freq, Cname, -- , NSVAR, DSUBres	Controls the solution data written to the database.	/ans_cmd/Hlp_C_OUTRES.html
PATH	PATH, NAME, nPts, nSets, nDiv	Defines a path name and establishes parameters for the path.	/ans_cmd/Hlp_C_PATH.html
PCIRC	PCIRC, RAD1, RAD2, THETA1, THETA2	Creates a circular area centered about the working plane origin.	/ans_cmd/Hlp_C_PCIRC.html
PDEF	PDEF, Lab, Item, Comp, Avglab	Interpolates an item onto a path.	/ans_cmd/Hlp_C_PDEF.html
PLCPLX	PLCPLX, KEY	Specifies the part of a complex variable to display.	/ans_cmd/Hlp_C_PLCPLX.html
PLDISP	PLDISP, KUND	Displays the displaced structure.	/ans_cmd/Hlp_C_PLDISP.html
PLLS	PLLS, LabI, LabJ, Fact, KUND, ViewUP	Displays element table items as contoured areas along elements.	/ans_cmd/Hlp_C_PLLS.html
PLNSOL	PLNSOL, Item, Comp, KUND, Fact, FileID	Displays results as continuous contours.	/ans_cmd/Hlp_C_PLNSOL.html
PLPAGM	PLPAGM, Item, Gscale, Nopt	Displays path items along the path geometry.	/ans_cmd/Hlp_C_PLPAGM.html
PLPATH	PLPATH, Lab1, Lab2, Lab3, Lab4, Lab5, Lab6	Displays path items on a graph.	/ans_cmd/Hlp_C_PLPATH.html
PLVAR	PLVAR, NVAR1, NVAR2, NVAR3, NVAR4, NVAR5, NVAR6, NVAR7, NVAR8, NVAR9, NVAR10	Displays up to ten variables in the form of a graph.	/ans_cmd/Hlp_C_PLVAR.html
PLVAR	PLVAR, NVAR1, NVAR2, NVAR3, NVAR4, NVAR5, NVAR6, NVAR7, NVAR8, NVAR9, NVAR10	Displays up to ten variables in the form of a graph.	/ans_cmd/Hlp_C_PLVAR.html
PPATH	PPATH, POINT, NODE, X, Y, Z, CS	Defines a path by picking or defining nodes, or locations on the currently active working plane, or by entering specific coordinate locations.	/ans_cmd/Hlp_C_PPATH.html
PRCPLX	PRCPLX, KEY	Defines the output form for complex variables.	/ans_cmd/Hlp_C_PRCPLX.html
PRED	PRED, Sskey, --, Lskey	Activates a predictor in a nonlinear analysis.	/ans_cmd/Hlp_C_PRED.html
PRPATH	PRPATH, Lab1, Lab2, Lab3, Lab4, Lab5, Lab6	Prints path items along a geometry path.	/ans_cmd/Hlp_C_PRPATH.html
PRRSOL	PRRSOL, Lab	Prints the constrained node reaction solution.	/ans_cmd/Hlp_C_PRRSOL.html
PSTRES	PSTRES, Key	Specifies whether prestress effects are calculated or included.	/ans_cmd/Hlp_C_PSTRES.html
R	R, NSET, R1, R2, R3, R4, R5, R6	Defines the element real constants.	/ans_cmd/Hlp_C_R.html
REAL	REAL, NSET	Sets the element real constant set attribute pointer.	/ans_cmd/Hlp_C_REAL.html
RECTNG	RECTNG, X1, X2, Y1, Y2	Creates a rectangular area anywhere on the working plane.	/ans_cmd/Hlp_C_RECTNG.html
RFORCE	RFORCE, NVAR, NODE, Item, Comp, Name	Specifies the total reaction force data to be stored.	/ans_cmd/Hlp_C_RFORCE.html
RSYS	RSYS, KCN	Activates a coordinate system for printout or display of element and nodal results.	/ans_cmd/Hlp_C_RSYS.html
SECCONTROL	SECCONTROL, VAL1, VAL2, VAL3, VAL4, VAL5, VAL6, VAL7, VAL8, VAL9, VAL10, VAL11, VAL12, VAL13	Supplements or overrides default section properties.	/ans_cmd/Hlp_C_SECCONTROL.html
SECDATA	SECDATA, VAL1, VAL2, VAL3, VAL4, VAL5, VAL6, VAL7, VAL8, VAL9, VAL10, VAL11, VAL12	Describes the geometry of a section.	/ans_cmd/Hlp_C_SECDATA.html
SECN	SECNUM, SECID	Sets the element section attribute pointer.	/ans_cmd/Hlp_C_SECNUM.html
SECNUM	SECNUM, SECID	Sets the element section attribute pointer.	/ans_cmd/Hlp_C_SECNUM.html
SECOFFSET	SECOFFSET, Location, OFFSET1, OFFSET2, CG-Y, CG-Z, SH-Y, SH-Z	Defines the section offset for cross sections.	/ans_cmd/Hlp_C_SECOFFSET.html
SECPLOT	SECPLOT, SECID, VAL1, VAL2, VAL3	Plots the geometry of a beam, pipe, shell, or reinforcing section to scale.	/ans_cmd/Hlp_C_SECPLOT.html
SECT	SECTYPE, SECID, Type, Subtype, Name, REFINEKEY	Associates section type information with a section ID number.	/ans_cmd/Hlp_C_SECTYPE.html
SECTYPE	SECTYPE, SECID, Type, Subtype, Name, REFINEKEY	Associates section type information with a section ID number.	/ans_cmd/Hlp_C_SECTYPE.html
SET	SET, Lstep, Sbstep, Fact, KIMG, TIME, ANGLE, NSET, ORDER	Defines the data set to be read from the results file.	/ans_cmd/Hlp_C_SET.html
SF	SF, Nlist, Lab, VALUE, VALUE2	Specifies surface loads on nodes.	/ans_cmd/Hlp_C_SF.html
SFA	SFA, Area, LKEY, Lab, VALUE, VALUE2	Specifies surface loads on the selected areas.	/ans_cmd/Hlp_C_SFA.html
SFBEAM	SFBEAM, Elem, LKEY, Lab, VALI, VALJ, VAL2I, VAL2J, IOFFST, JOFFST, LENRAT	Specifies surface loads on beam and pipe elements.	/ans_cmd/Hlp_C_SFBEAM.html
SFE	SFE, Elem, LKEY, Lab, KVAL, VAL1, VAL2, VAL3, VAL4	Specifies surface loads on elements.	/ans_cmd/Hlp_C_SFE.html
SFEDELE	SFEDELE, ELEM, LKEY, Lab	Deletes surface loads from elements.	/ans_cmd/Hlp_C_SFEDELE.html
SFGRAD	SFGRAD, Lab, SLKCN, Sldir, SLZER, SLOPE	Specifies a gradient (slope) for surface loads.	/ans_cmd/Hlp_C_SFGRAD.html
SFL	SFL, Line, Lab, VALI, VALJ, VAL2I, VAL2J	Specifies surface loads on lines of an area.	/ans_cmd/Hlp_C_SFL.html
SFLDELE	SFLDELE, LINE, Lab	Deletes surface loads from lines.	/ans_cmd/Hlp_C_SFLDELE.html
SMRT	SMRTSIZE, SIZLVL, FAC, EXPND, TRANS, ANGL, ANGH, GRATIO, SMHLC, SMANC, MXITR, SPRX	Specifies meshing parameters for automatic (smart) element sizing.	/ans_cmd/Hlp_C_SMRTSIZE.htmlSMRT	SMRTSIZE, SIZLVL, FAC, EXPND, TRANS, ANGL, ANGH, GRATIO, SMHLC, SMANC, MXITR, SPRX	Specifies meshing parameters for automatic (smart) element sizing.	/ans_cmd/Hlp_C_SMRTSIZE.html
SMRTSIZE	SMRTSIZE, SIZLVL, FAC, EXPND, TRANS, ANGL, ANGH, GRATIO, SMHLC, SMANC, MXITR, SPRX	Specifies meshing parameters for automatic (smart) element sizing.	/ans_cmd/Hlp_C_SMRTSIZE.html
SOLVE	SOLVE, Action	Starts a solution.	/ans_cmd/Hlp_C_SOLVE.html
TB	TB, Lab, MAT, NTEMP, NPTS, TBOPT, EOSOPT, FuncName	Activates a data table for material properties or special element input.	/ans_cmd/Hlp_C_TB.html
TBDATA	TBDATA, STLOC, C1, C2, C3, C4, C5, C6	Defines data for the material data table.	/ans_cmd/Hlp_C_TBDATA.html
TBPT	TBPT, Oper, X1, X2, X3, ..., XN	Defines a point on a nonlinear data curve.	/ans_cmd/Hlp_C_TBPT.html
TBTEMP	TBTEMP, TEMP, KMOD	Defines a temperature for a material data table.	/ans_cmd/Hlp_C_TBTEMP.html
TIME	TIME, TIME	Sets the time for a load step.	/ans_cmd/Hlp_C_TIME.html
TIMINT	TIMINT, Key, Lab	Turns on transient effects.	/ans_cmd/Hlp_C_TIMINT.html
TRNOPT	TRNOPT, Method, MAXMODE, --, MINMODE, MCout, TINTOPT, VAout	Specifies transient analysis options.	/ans_cmd/Hlp_C_TRNOPT.html
TSHAP	TSHAP, Shape	Defines simple 2-D and 3-D geometric surfaces for target segment elements.	/ans_cmd/Hlp_C_TSHAP.html
TUNIF	TUNIF, TEMP	Assigns a uniform temperature to all nodes.	/ans_cmd/Hlp_C_TUNIF.html
TYPE	TYPE, ITYPE	Sets the element type attribute pointer.	/ans_cmd/Hlp_C_TYPE.html
UIMP	UIMP, MAT, Lab1, Lab2, Lab3, VAL1, VAL2, VAL3	Defines constant material properties (GUI).	/ans_cmd/Hlp_C_UIMP.html
V	V, P1, P2, P3, P4, P5, P6, P7, P8	Defines a volume through keypoints.	/ans_cmd/Hlp_C_V.html
VDELE	VDELE, NV1, NV2, NINC, KSWP	Deletes unmeshed volumes.	/ans_cmd/Hlp_C_VDELE.html
VEXT	VEXT, NA1, NA2, NINC, DX, DY, DZ, RX, RY, RZ	Generates additional volumes by extruding areas.	/ans_cmd/Hlp_C_VEXT.html
VMESH	VMESH, NV1, NV2, NINC	Generates nodes and volume elements within volumes.	/ans_cmd/Hlp_C_VMESH.html
VOVLAP	VOVLAP, NV1, NV2, NV3, NV4, NV5, NV6, NV7, NV8, NV9	Overlaps volumes.	/ans_cmd/Hlp_C_VOVLAP.html
VROTAT	VROTAT, NA1, NA2, NA3, NA4, NA5, NA6, PAX1, PAX2, ARC, NSEG	Generates cylindrical volumes by rotating an area pattern about an axis.	/ans_cmd/Hlp_C_VROTAT.html
VSWEEP	VSWEEP, VNUM, SRCA, TRGA, LSMO	Fills an existing unmeshed volume with elements by sweeping the mesh from an adjacent area through the volume.	/ans_cmd/Hlp_C_VSWEEP.html
WPOFFS	WPOFFS, XOFF, YOFF, ZOFF	Offsets the working plane.	/ans_cmd/Hlp_C_WPOFFS.html
WPROTA	WPROTA, THXY, THYZ, THZX	Rotates the working plane.	/ans_cmd/Hlp_C_WPROTA.html
XVAR	XVAR, N	Specifies the X variable to be displayed.	/ans_cmd/Hlp_C_XVAR.html
