*DO	*DO, Par, IVAL, FVAL, INC	Do ciklus kezdetének definiálása.	/ans_cmd/Hlp_C_DO.html
*ENDDO	*ENDDO	Bezárja a do ciklust és elkezdi az iterálást.	/ans_cmd/Hlp_C_ENDDO.html
*GET	*GET, Par, Entity, ENTNUM, Item1, IT1NUM, Item2, IT2NUM	Kinyeri az értéket és tárolja egy skalár vagy vektor paraméterként.	/ans_cmd/Hlp_C_GET.html
/ANG	/ANGLE, WN, THETA, Axis, KINCR	Elforgatja a megjelenítést egy adott tengely körül.	/ans_cmd/Hlp_C_ANGLE.html
/ANGLE	/ANGLE, WN, THETA, Axis, KINCR	Elforgatja a megjelenítést egy adott tengely körül.	/ans_cmd/Hlp_C_ANGLE.html
/EFACET	/EFACET, NUM	Definiálja az elemenként alkalmazott oldalak számát a "PowerGraphics" megjelenítés során.	/ans_cmd/Hlp_C_EFACET.html
/ESHAPE	/ESHAPE, SCALE, KEY	Megjeleníti az elemeket a "real constants" vagy "section" tulajdonságok alapján.	/ans_cmd/Hlp_C_ESHAPE.html
/IMAGE	/IMAGE, Label, Fname, Ext, --	Engedélyezi az ábra mentését.	/ans_cmd/Hlp_C_IMAGE.html
/PNUM	/PNUM, Label, KEY	Irányítja az objektumok számozását/színezését az ábrákon.	/ans_cmd/Hlp_C_PNUM.html
/POST1	/POST1	Belép az eredmények adathalmazát használó posztprocesszáló részbe.	/ans_cmd/Hlp_C_POST1.html
/POST26	/POST26	Belép az időfüggő adatokat használó posztproceszáló részbe.	/ans_cmd/Hlp_C_POST26.html
/PREP7	/PREP7	Belép a modell készítő preprocesszáló részbe.	/ans_cmd/Hlp_C_PREP7.html
/PSYMB	/PSYMB, Label, KEY	Megjelenít a kijelzőn számos szimbólumot.	/ans_cmd/Hlp_C_PSYMB.html
/REP	/REPLOT, Label	Újra meghívja az utolsó megjelenítési parancsot.	/ans_cmd/Hlp_C_REPLOT.html
/REPLOT	/REPLOT, Label	Újra meghívja az utolsó megjelenítési parancsot.	/ans_cmd/Hlp_C_REPLOT.html
/RGB	/RGB, Kywrd, PRED, PGRN, PBLU, N1, N2, NINC, NCNTR	Definiálja az indexekhez és kontúrokhoz tartozó  RGB szín értékeket.	/ans_cmd/Hlp_C_RGB.html
/SOL	/SOLU	Belép a megoldó modulba.	/ans_cmd/Hlp_C_SOLU_sl.html
/SOLU	/SOLU	Belép a megoldó modulba.	/ans_cmd/Hlp_C_SOLU_sl.html
/STATUS	/STATUS, Lab	Listázza a futtatáshoz tartozó elemek állapotát.	/ans_cmd/Hlp_C_STATUS.html
/VIEW	/VIEW, WN, XV, YV, ZV	Definiálja a megjelenítéshez tartozó nézeti irányt.	/ans_cmd/Hlp_C_VIEW.html
ACEL	ACEL, ACEL_X, ACEL_Y, ACEL_Z	Definiálja az analízishez tartozó lineáris gyirsululás értékét a globális derékszögű koordinátarendszerben.	/ans_cmd/Hlp_C_ACEL.html
ADRAG	ADRAG, NL1, NL2, NL3, NL4, NL5, NL6, NLP1, NLP2, NLP3, NLP4, NLP5, NLP6	Felület létrehozása vonalak útvonal mentén történő elhúzásával.	/ans_cmd/Hlp_C_ADRAG.html
AGEN	AGEN, ITIME, NA1, NA2, NINC, DX, DY, DZ, KINC, NOELEM, IMOVE	Járulékos felületek létrehozása felel mintázatok felhasználásával.	/ans_cmd/Hlp_C_AGEN.html
AGLUE	AGLUE, NA1, NA2, NA3, NA4, NA5, NA6, NA7, NA8, NA9	Új felületek létrehozása felületek egyesítése által.	/ans_cmd/Hlp_C_AGLUE.html
AL	AL, L1, L2, L3, L4, L5, L6, L7, L8, L9, L10	Felület létrehozása az azt határoló vonalak felhasználásával.	/ans_cmd/Hlp_C_AL.html
ALLSEL	ALLSEL, LabT, Entity	Összes elem kiválasztása.	/ans_cmd/Hlp_C_ALLSEL.html
AMESH	AMESH, NA1, NA2, NINC	Felületelemek és csomópontok létreozása a kiválasztott felületen.	/ans_cmd/Hlp_C_AMESH.html
ANTYPE	ANTYPE, Antype, Status, LDSTEP, SUBSTEP, Action	Analízis és az újraindítás típusának meghatározása.	/ans_cmd/Hlp_C_ANTYPE.html
AREFINE	AREFINE, NA1, NA2, NINC, LEVEL, DEPTH, POST, RETAIN	Végeselemes háló finomítása a kiválasztott terület környezetében.	/ans_cmd/Hlp_C_AREFINE.html
AREVERSE	AREVERSE, ANUM, NOEFLIP	Felület normálisának megfordítása a kapcsolódás és végeselemes háló állapotára való tekintet nélkül.	/ans_cmd/Hlp_C_AREVERSE.html
AROTAT	AROTAT, NL1, NL2, NL3, NL4, NL5, NL6, PAX1, PAX2, ARC, NSEG	Hengeres felületek létrehozása vonalak adott tengely körüli megforgatásával.	/ans_cmd/Hlp_C_AROTAT.html
ASBA	ASBA, NA1, NA2, SEPO, KEEP1, KEEP2	Adott felületek kivonása adott felületekből.	/ans_cmd/Hlp_C_ASBA.html
BFL	BFL, Line, Lab, VAL1, VAL2, VAL3, VAL4	Vonal menti terhelés definiálása.	/ans_cmd/Hlp_C_BFL.html
BLC4	BLC4, XCORNER, YCORNER, WIDTH, HEIGHT, DEPTH	Téglalap lap vagy test létrehozása a sarokpontok segítségével.	/ans_cmd/Hlp_C_BLC4.html
BLC5	BLC5, XCENTER, YCENTER, WIDTH, HEIGHT, DEPTH	Téglalap vagy test létrehozása a középpont és sarokpontok segítségével.	/ans_cmd/Hlp_C_BLC5.html
BUCOPT	BUCOPT, Method, NMODE, SHIFT, LDMULTE, RangeKey	Beállítja a kihajlás vizsglathoz tartozó opciókat.	/ans_cmd/Hlp_C_BUCOPT.html
CIRCLE	CIRCLE, PCENT, RAD, PAXIS, PZERO, ARC, NSEG	Körívek generálása.	/ans_cmd/Hlp_C_CIRCLE.html
CSKP	CSKP, KCN, KCS, PORIG, PXAXS, PXYPL, PAR1, PAR2	Lokális koortdinátarendszer definiálása kulcspontok megadásával.	/ans_cmd/Hlp_C_CSKP.html
CSYS	CSYS, KCN	Korábban definiált koordinátarendszer aktiválása.	/ans_cmd/Hlp_C_CSYS.html
D	D, Node, Lab, VALUE, VALUE2, NEND, NINC, Lab2, Lab3, Lab4, Lab5, Lab6	Szabadságfokokra vonatkozó kényszer definiálása adott csomópontban.	/ans_cmd/Hlp_C_D.html
DA	DA, AREA, Lab, Value1, Value2	Szabadságfokokra vonatkozó kényszer definiálása adott felületen.	/ans_cmd/Hlp_C_DA.html
DK	DK, KPOI, Lab, VALUE, VALUE2, KEXPND, Lab2, Lab3, Lab4, Lab5, Lab6	Szabadságfokokra vonatkozó kényszer definiálása adott kulcspontban.	/ans_cmd/Hlp_C_DK.html
DL	DL, LINE, AREA, Lab, Value1, Value2	Szabadságfokokra vonatkozó kényszer definiálása adott vonalon.	/ans_cmd/Hlp_C_DL.html
DSYS	DSYS, KCN	Listázáshoz és megjelenítéshez adott koordinátarendszer aktiválása.	/ans_cmd/Hlp_C_DSYS.html
E	E, I, J, K, L, M, N, O, P	Elem létrehozása adott csomópontok felhasználásával.	/ans_cmd/Hlp_C_E.html
EPLOT	EPLOT	Elemek megjelenítése.	/ans_cmd/Hlp_C_EPLOT.html
EQSLV	EQSLV, Lab, TOLER, MULT, --, KeepFile	Egyenletrendszer megoldó típusának definiálása.	/ans_cmd/Hlp_C_EQSLV.html
ESEL	ESEL, Type, Item, Comp, VMIN, VMAX, VINC, KABS	Elem részhalmaz kiválasztása.	/ans_cmd/Hlp_C_ESEL.html
ESLL	ESLL, Type	Vonalakhoz kapcsolódó elemek kiválasztása.	/ans_cmd/Hlp_C_ESLL.html
ET	ET, ITYPE, Ename, KOP1, KOP2, KOP3, KOP4, KOP5, KOP6, INOPR	Lokális elemtípus definiálása az elemkönyvtár felhasználásával.	/ans_cmd/Hlp_C_ET.html
ETABLE	ETABLE, Lab, Item, Comp, Option	Elemhez köthető paramétertáblázat kitöltése.	/ans_cmd/Hlp_C_ETABLE.html
F	F, NODE, Lab, VALUE, VALUE2, NEND, NINC	Csomóponti terhelés definiálása.	/ans_cmd/Hlp_C_F.html
FDELE	FDELE, NODE, Lab, NEND, NINC, Lkey	CSomóponti terhelés törlése.	/ans_cmd/Hlp_C_FDELE.html
FINISH	FINISH	Normális kilépés processzorból.	/ans_cmd/Hlp_C_FINISH.html
FK	FK, KPOI, Lab, VALUE, VALUE2	Terhelés definiálása kulcsompontokban.	/ans_cmd/Hlp_C_FK.html
FKDELE	FKDELE, KPOI, Lab	Terhelés törlése adott kulcspontokból.	/ans_cmd/Hlp_C_FKDELE.html
GPLOT	GPLOT	Átalános megjelenítési tulajdonságok beállítása.	/ans_cmd/Hlp_C_GPLOT.html
K	K, NPT, X, Y, Z	Kulcspont felvétele.	/ans_cmd/Hlp_C_K.html
KEYOPT	KEYOPT, ITYPE, KNUM, VALUE	Elemtulajdonságok beállítása.	/ans_cmd/Hlp_C_KEYOPT.html
KEYW	KEYW, Keyword, KEY	Sets a keyword used by the GUI for context filtering (GUI).	/ans_cmd/Hlp_C_KEYW.html
KGEN	KGEN, ITIME, NP1, NP2, NINC, DX, DY, DZ, KINC, NOELEM, IMOVE	Járulékos kulcspontok definiálása egy kulcspont mintázat alapján.	/ans_cmd/Hlp_C_KGEN.html
KSEL	KSEL, Type, Item, Comp, VMIN, VMAX, VINC, KABS	Kiválasztja a kulcspontok részhalmazát.	/ans_cmd/Hlp_C_KSEL.html
L	L, P1, P2, NDIV, SPACE, XV1, YV1, ZV1, XV2, YV2, ZV2	Vonal létrehozása kettő kulcspont alapján.	/ans_cmd/Hlp_C_L.html
LARC	LARC, P1, P2, PC, RAD	Körív létrehozása	/ans_cmd/Hlp_C_LARC.html
LATT	LATT, MAT, REAL, TYPE, --, KB, KE, SECNUM	Associates element attributes with the selected, unmeshed lines.	/ans_cmd/Hlp_C_LATT.html
LCASE	LCASE, LCNO	Reads a load case into the database.	/ans_cmd/Hlp_C_LCASE.html
LCDEF	LCDEF, LCNO, LSTEP, SBSTEP, KIMG	Creates a load case from a set of results on a results file.	/ans_cmd/Hlp_C_LCDEF.html
LCOPER	LCOPER, Oper, LCASE1, Oper2, LCASE2	Performs load case operations.	/ans_cmd/Hlp_C_LCOPER.html
LESIZE	LESIZE, NL1, SIZE, ANGSIZ, NDIV, SPACE, KFORC, LAYER1, LAYER2, KYNDIV	Specifies the divisions and spacing ratio on unmeshed lines.	/ans_cmd/Hlp_C_LESIZE.html
LFILLT	LFILLT, NL1, NL2, RAD, PCENT	Generates a fillet line between two intersecting lines.	/ans_cmd/Hlp_C_LFILLT.html
LGEN	LGEN, ITIME, NL1, NL2, NINC, DX, DY, DZ, KINC, NOELEM, IMOVE	Generates additional lines from a pattern of lines.	/ans_cmd/Hlp_C_LGEN.html
LINL	LINL, NL1, NL2, NL3, NL4, NL5, NL6, NL7, NL8, NL9	Finds the common intersection of lines.	/ans_cmd/Hlp_C_LINL.html
LMESH	LMESH, NL1, NL2, NINC	Generates nodes and line elements along lines.	/ans_cmd/Hlp_C_LMESH.html
LSEL	LSEL, Type, Item, Comp, VMIN, VMAX, VINC, KSWP	Selects a subset of lines.	/ans_cmd/Hlp_C_LSEL.html
LSSOLVE	LSSOLVE, LSMIN, LSMAX, LSINC	Reads and solves multiple load steps.	/ans_cmd/Hlp_C_LSSOLVE.html
LSWRITE	LSWRITE, LSNUM	Writes load and load step option data to a file.	/ans_cmd/Hlp_C_LSWRITE.html
LSYMM	LSYMM, Ncomp, NL1, NL2, NINC, KINC, NOELEM, IMOVE	Generates lines from a line pattern by symmetry reflection.	/ans_cmd/Hlp_C_LSYMM.html
LUMPM	LUMPM, Key	Specifies a lumped mass matrix formulation.	/ans_cmd/Hlp_C_LUMPM.html
MODOPT	MODOPT, Method, NMODE, FREQB, FREQE, Cpxmod, Nrmkey, ModType, BlockSize, --, --, Scalekey	Specifies modal analysis options.	/ans_cmd/Hlp_C_MODOPT.html
MPDATA	MPDATA, Lab, MAT, SLOC, C1, C2, C3, C4, C5, C6	Defines property data to be associated with the temperature table.	/ans_cmd/Hlp_C_MPDATA.html
MPTEMP	MPTEMP, SLOC, T1, T2, T3, T4, T5, T6	Defines a temperature table for material properties.	/ans_cmd/Hlp_C_MPTEMP.html
MSHAPE	MSHAPE, KEY, Dimension	For elements that support multiple shapes, specifies the element shape to be used for meshing.	/ans_cmd/Hlp_C_MSHAPE.html
MSHKEY	MSHKEY, KEY	Specifies whether free meshing or mapped meshing should be used to mesh a model.	/ans_cmd/Hlp_C_MSHKEY.html
MSHKEY	MSHKEY, KEY	Specifies whether free meshing or mapped meshing should be used to mesh a model.	/ans_cmd/Hlp_C_MSHKEY.html
MXPAND	MXPAND, NMODE, FREQB, FREQE, Elcalc, SIGNIF, MSUPkey, ModeSelMethod	Specifies the number of modes to expand and write for a modal or buckling analysis.	/ans_cmd/Hlp_C_MXPAND.html
NEQIT	NEQIT, NEQIT, FORCEkey	Specifies the maximum number of equilibrium iterations for nonlinear analyses.	/ans_cmd/Hlp_C_NEQIT.html
NKPT	NKPT, NODE, NPT	Defines a node at an existing keypoint location.	/ans_cmd/Hlp_C_NKPT.html
NLGEOM	NLGEOM, Key	Includes large-deflection effects in a static or full transient analysis.	/ans_cmd/Hlp_C_NLGEOM.html
NROTAT	NROTAT, NODE1, NODE2, NINC	Rotates nodal coordinate systems into the active system.	/ans_cmd/Hlp_C_NROTAT.html
NROTAT  NROTAT, NODE1, NODE2, NINC  Rotates nodal coordinate systems into the active system.    /ans_cmd/Hlp_C_NROTAT.html
NSEL	NSEL, Type, Item, Comp, VMIN, VMAX, VINC, KABS	Selects a subset of nodes.	/ans_cmd/Hlp_C_NSEL.html
NSLK	NSLK, Type	Selects those nodes associated with the selected keypoints.	/ans_cmd/Hlp_C_NSLK.html
NSLL	NSLL, Type, NKEY	Selects those nodes associated with the selected lines.	/ans_cmd/Hlp_C_NSLL.html
NSUBST	NSUBST, NSBSTP, NSBMX, NSBMN, Carry	Specifies the number of substeps to be taken this load step.	/ans_cmd/Hlp_C_NSUBST.html
NUMMRG	NUMMRG, Label, TOLER, GTOLER, Action, Switch	Merges coincident or equivalently defined items.	/ans_cmd/Hlp_C_NUMMRG.html
PATH	PATH, NAME, nPts, nSets, nDiv	Defines a path name and establishes parameters for the path.	/ans_cmd/Hlp_C_PATH.html
PDEF	PDEF, Lab, Item, Comp, Avglab	Interpolates an item onto a path.	/ans_cmd/Hlp_C_PDEF.html
PLDISP	PLDISP, KUND	Displays the displaced structure.	/ans_cmd/Hlp_C_PLDISP.html
PLLS	PLLS, LabI, LabJ, Fact, KUND, ViewUP	Displays element table items as contoured areas along elements.	/ans_cmd/Hlp_C_PLLS.html
PLNSOL	PLNSOL, Item, Comp, KUND, Fact, FileID	Displays results as continuous contours.	/ans_cmd/Hlp_C_PLNSOL.html
PLNSOL	PLNSOL, Item, Comp, KUND, Fact, FileID	Displays results as continuous contours.	/ans_cmd/Hlp_C_PLNSOL.html
PLPATH	PLPATH, Lab1, Lab2, Lab3, Lab4, Lab5, Lab6	Displays path items on a graph.	/ans_cmd/Hlp_C_PLPATH.html
PPATH	PPATH, POINT, NODE, X, Y, Z, CS	Defines a path by picking or defining nodes, or locations on the currently active working plane, or by entering specific coordinate locations.	/ans_cmd/Hlp_C_PPATH.html
PSTRES	PSTRES, Key	Specifies whether prestress effects are calculated or included.	/ans_cmd/Hlp_C_PSTRES.html
R	R, NSET, R1, R2, R3, R4, R5, R6	Defines the element real constants.	/ans_cmd/Hlp_C_R.html
REAL	REAL, NSET	Sets the element real constant set attribute pointer.	/ans_cmd/Hlp_C_REAL.html
SECCONTROL	SECCONTROL, VAL1, VAL2, VAL3, VAL4, VAL5, VAL6, VAL7, VAL8, VAL9, VAL10, VAL11, VAL12, VAL13	Supplements or overrides default section properties.	/ans_cmd/Hlp_C_SECCONTROL.html
SECCONTROL  SECCONTROL, VAL1, VAL2, VAL3, VAL4, VAL5, VAL6, VAL7, VAL8, VAL9, VAL10, VAL11, VAL12, VAL13    Supplements or overrides default section properties.    /ans_cmd/Hlp_C_SECCONTROL.html
SECDATA	SECDATA, VAL1, VAL2, VAL3, VAL4, VAL5, VAL6, VAL7, VAL8, VAL9, VAL10, VAL11, VAL12	Describes the geometry of a section.	/ans_cmd/Hlp_C_SECDATA.html
SECN	SECNUM, SECID	Sets the element section attribute pointer.	/ans_cmd/Hlp_C_SECNUM.html
SECNUM	SECNUM, SECID	Sets the element section attribute pointer.	/ans_cmd/Hlp_C_SECNUM.html
SECOFFSET	SECOFFSET, Location, OFFSET1, OFFSET2, CG-Y, CG-Z, SH-Y, SH-Z	Defines the section offset for cross sections.	/ans_cmd/Hlp_C_SECOFFSET.html
SECT	SECTYPE, SECID, Type, Subtype, Name, REFINEKEY	Associates section type information with a section ID number.	/ans_cmd/Hlp_C_SECTYPE.html
SECTYPE	SECTYPE, SECID, Type, Subtype, Name, REFINEKEY	Associates section type information with a section ID number.	/ans_cmd/Hlp_C_SECTYPE.html
SET	SET, Lstep, Sbstep, Fact, KIMG, TIME, ANGLE, NSET, ORDER	Defines the data set to be read from the results file.	/ans_cmd/Hlp_C_SET.html
SFA	SFA, Area, LKEY, Lab, VALUE, VALUE2	Specifies surface loads on the selected areas.	/ans_cmd/Hlp_C_SFA.html
SFBEAM	SFBEAM, Elem, LKEY, Lab, VALI, VALJ, VAL2I, VAL2J, IOFFST, JOFFST, LENRAT	Specifies surface loads on beam and pipe elements.	/ans_cmd/Hlp_C_SFBEAM.html
SFE	SFE, Elem, LKEY, Lab, KVAL, VAL1, VAL2, VAL3, VAL4	Specifies surface loads on elements.	/ans_cmd/Hlp_C_SFE.html
SFEDELE	SFEDELE, ELEM, LKEY, Lab	Deletes surface loads from elements.	/ans_cmd/Hlp_C_SFEDELE.html
SFGRAD	SFGRAD, Lab, SLKCN, Sldir, SLZER, SLOPE	Specifies a gradient (slope) for surface loads.	/ans_cmd/Hlp_C_SFGRAD.html
SFL	SFL, Line, Lab, VALI, VALJ, VAL2I, VAL2J	Specifies surface loads on lines of an area.	/ans_cmd/Hlp_C_SFL.html
SFLDELE	SFLDELE, LINE, Lab	Deletes surface loads from lines.	/ans_cmd/Hlp_C_SFLDELE.html
SMRT	SMRTSIZE, SIZLVL, FAC, EXPND, TRANS, ANGL, ANGH, GRATIO, SMHLC, SMANC, MXITR, SPRX	Specifies meshing parameters for automatic (smart) element sizing.	/ans_cmd/Hlp_C_SMRTSIZE.htmlSMRT	SMRTSIZE, SIZLVL, FAC, EXPND, TRANS, ANGL, ANGH, GRATIO, SMHLC, SMANC, MXITR, SPRX	Specifies meshing parameters for automatic (smart) element sizing.	/ans_cmd/Hlp_C_SMRTSIZE.html
SMRTSIZE	SMRTSIZE, SIZLVL, FAC, EXPND, TRANS, ANGL, ANGH, GRATIO, SMHLC, SMANC, MXITR, SPRX	Specifies meshing parameters for automatic (smart) element sizing.	/ans_cmd/Hlp_C_SMRTSIZE.html
SOLVE	SOLVE, Action	Starts a solution.	/ans_cmd/Hlp_C_SOLVE.html
TIME	TIME, TIME	Sets the time for a load step.	/ans_cmd/Hlp_C_TIME.html
TUNIF	TUNIF, TEMP	Assigns a uniform temperature to all nodes.	/ans_cmd/Hlp_C_TUNIF.html
TYPE	TYPE, ITYPE	Sets the element type attribute pointer.	/ans_cmd/Hlp_C_TYPE.html
UIMP	UIMP, MAT, Lab1, Lab2, Lab3, VAL1, VAL2, VAL3	Defines constant material properties (GUI).	/ans_cmd/Hlp_C_UIMP.html
V	V, P1, P2, P3, P4, P5, P6, P7, P8	Defines a volume through keypoints.	/ans_cmd/Hlp_C_V.html
VEXT	VEXT, NA1, NA2, NINC, DX, DY, DZ, RX, RY, RZ	Generates additional volumes by extruding areas.	/ans_cmd/Hlp_C_VEXT.html
VMESH	VMESH, NV1, NV2, NINC	Generates nodes and volume elements within volumes.	/ans_cmd/Hlp_C_VMESH.html
VROTAT	VROTAT, NA1, NA2, NA3, NA4, NA5, NA6, PAX1, PAX2, ARC, NSEG	Generates cylindrical volumes by rotating an area pattern about an axis.	/ans_cmd/Hlp_C_VROTAT.html
VSWEEP	VSWEEP, VNUM, SRCA, TRGA, LSMO	Fills an existing unmeshed volume with elements by sweeping the mesh from an adjacent area through the volume.	/ans_cmd/Hlp_C_VSWEEP.html
WPOFFS	WPOFFS, XOFF, YOFF, ZOFF	Offsets the working plane.	/ans_cmd/Hlp_C_WPOFFS.html
WPROTA	WPROTA, THXY, THYZ, THZX	Rotates the working plane.	/ans_cmd/Hlp_C_WPROTA.html
