a = 5
ab = 6
b = 7
c = a*ab
d = NODE(1,2,3) ! does this work?

R,1,2*a+ab + b/2 + b**3
NODE(a,ab,b)
K,1,a,a*b,a**c ! and this?
*GET,1,2,3,c,
*GET,1,2,3,c
NSEL,d
ET,1,BEAM188
*DO,i,j,2
asd
wasd
*ENDDO
